OpenVSP model (file version 5), 3 components.
Geometry view with OpenVSP parameter names; values to 6 digits, angles in degrees, lengths in the model's unit.
Overall bounding box: X_Min=-0.57 X_Len=1.05017 Y_Min=-0.715165 Y_Len=1.43033 Z_Min=-0.0516187 Z_Len=0.103237

Wing "WingGeom"
  location (X Y Z) -0.12 0 0.015, rotation 0 4 0
  symmetric about XZ
  bounding box size 0.600192 1.43033 0.0513956
  mass: Density=1 Shell_Flag=1 Mass_Area=0.8 Mass_Prior=0
  totals: TotalSpan=1.4 TotalProjectedSpan=1.3995 TotalChord=0.3405 TotalArea=0.4291 TotalAR=4.56444
  root: chord 0.4, twist 0, CST airfoil ContLERad=1 LowDegree=7 ThickChord=0.0857423 UpDegree=7 Au=[0.17 0.2 0.2 0.104876 0.138886 0.109009 0.119717 0.116312] Al=[-0.17 0 0 -0.104876 -0.138886 -0.109009 -0.119717 -0.116312]
  sections:
    n  Span  Root_Chord  Tip_Chord  Area     Sweep  Sweep_Location  Dihedral  Twist   Twist_Location  tip airfoil
    1  0.15  0.4         0.4        0.06     0      0               0         0       0.25            as above
    2  0.55  0.4         0.162      0.15455  20     1               1.72727   -3.863  0.25            CST airfoil ContLERad=1 LowDegree=7 ThickChord=0.117474 UpDegree=7 Au=[0.2 0.2 0 0.143623 0.149218 0.137218 0.140721 0.141105] Al=[-0.2 -0.2 -0.2 -0.143623 -0.149218 -0.137218 -0.140721 -0.141105]
  structure "WingGeom_Struct0": Skin, RibArray0

Blank "BlankGeom"
  location (X Y Z) -0.25 0 0, rotation 0 0 0
  mass: Density=1 Shell_Flag=0 Mass_Area=1 Mass_Prior=0 PointMass=0.2 CGx=0 CGy=0 CGz=0 Ixx=0 Iyy=0 Izz=0 Ixy=0 Ixz=0 Iyz=0

Stack "StackGeom"
  location (X Y Z) -0.57 0 0, rotation 0 0 0
  bounding box size 1 0.103237 0.103237
  cross sections:
    n  XDelta  YDelta  ZDelta  shape
    0  0       0       0       point
    1  0.45    0       0       rounded rectangle RoundRectXSec_Radius=0.005 RoundedRect_Height=0.07 RoundedRect_Width=0.1
    2  0.4     0       0       as above
    3  0.15    0       0       point

Parameter links (A drives B)
  WingGeom:XSec_0:Au_0 -> WingGeom:XSec_1:Au_0
  WingGeom:XSec_0:Au_1 -> WingGeom:XSec_1:Au_1
  WingGeom:XSec_0:Au_2 -> WingGeom:XSec_1:Au_2
  WingGeom:XSec_0:Al_1 -> WingGeom:XSec_1:Al_1
  WingGeom:XSec_0:Al_2 -> WingGeom:XSec_1:Al_2
  WingGeom:XSec_1:Root_Chord -> WingGeom:XSec_2:Root_Chord
  WingGeom:XSec_1:Root_Chord -> StackGeom:XSec_2:XDelta
  StackGeom:XSec_1:RoundedRect_Width -> StackGeom:XSec_2:RoundedRect_Width
  StackGeom:XSec_1:RoundRectXSec_Radius -> StackGeom:XSec_2:RoundRectXSec_Radius
  StackGeom:XSec_1:RoundedRect_Height -> StackGeom:XSec_2:RoundedRect_Height

VSPAERO settings: Sref=0.390598 bref=1.48676 cref=0.231413 Xcg=0 Ycg=0 Zcg=0 AlphaStart=0 AlphaEnd=10 AlphaNpts=3 BetaStart=0 BetaEnd=0 BetaNpts=1 MachStart=0 MachEnd=0 MachNpts=1 ReCref=1e+07 Vinf=100 Rho=0.002377
